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! MAPDL input file written by Workbench Study version 19.1
! Writing time: 06/17/2019 20:24:01
/com,--- Data in consistent MKS units.
/units,MKS
fini
/prep7
toffst,273.15 		! Temperature offset from absolute zero
tref,22 		! This is internally used to set tunif command
shpp,off,,nowarn 	! Turn off shape checking because checks are already performed inside WB mesher
etcon,set 		! Allow MAPDL to choose best keyopts for 180x elements
local,13,0,0.000000000000000E+000,0.000000000000000E+000,0.000000000000000E+000,0.000000000000000E+000,0.000000000000000E+000,0.000000000000000E+000

local,14,0,0.000000000000000E+000,0.000000000000000E+000,0.000000000000000E+000,0.000000000000000E+000,0.000000000000000E+000,0.000000000000000E+000

local,15,0,0.000000000000000E+000,0.000000000000000E+000,0.000000000000000E+000,0.000000000000000E+000,0.000000000000000E+000,0.000000000000000E+000

local,16,0,0.000000000000000E+000,0.000000000000000E+000,0.000000000000000E+000,0.000000000000000E+000,0.000000000000000E+000,0.000000000000000E+000

local,17,0,0.000000000000000E+000,0.000000000000000E+000,0.000000000000000E+000,0.000000000000000E+000,0.000000000000000E+000,0.000000000000000E+000

local,18,0,0.000000000000000E+000,0.000000000000000E+000,0.000000000000000E+000,0.000000000000000E+000,0.000000000000000E+000,0.000000000000000E+000

local,12,0,0.000000000000000E+000,0.000000000000000E+000,0.000000000000000E+000,0.000000000000000E+000,0.000000000000000E+000,0.000000000000000E+000

csys,0 			! Setting current coordinate system to global
/com,*********** Write element types ***********
et,1,187 		! Element type for Physics Options 1

et,2,154 		! Element type for Force 1
keyo,2,2,1 		! Apply load in local reference frame
keyo,2,7,1 		! Use original area so load is constant in large deformation
keyo,2,11,2 		! Use real and not project area
et,3,154 		! Element type for Force 1
keyo,3,2,1 		! Apply load in local reference frame
keyo,3,7,1 		! Use original area so load is constant in large deformation
keyo,3,11,2 		! Use real and not project area
et,4,154 		! Element type for Force 1
keyo,4,2,1 		! Apply load in local reference frame
keyo,4,7,1 		! Use original area so load is constant in large deformation
keyo,4,11,2 		! Use real and not project area
et,5,154 		! Element type for Force 1
keyo,5,2,1 		! Apply load in local reference frame
keyo,5,7,1 		! Use original area so load is constant in large deformation
keyo,5,11,2 		! Use real and not project area
et,6,154 		! Element type for Force 1
keyo,6,2,1 		! Apply load in local reference frame
keyo,6,7,1 		! Use original area so load is constant in large deformation
keyo,6,11,2 		! Use real and not project area

et,7,154 		! Element type for Force 2
keyo,7,2,1 		! Apply load in local reference frame
keyo,7,7,1 		! Use original area so load is constant in large deformation
keyo,7,11,2 		! Use real and not project area
et,8,154 		! Element type for Force 2
keyo,8,2,1 		! Apply load in local reference frame
keyo,8,7,1 		! Use original area so load is constant in large deformation
keyo,8,11,2 		! Use real and not project area
et,9,154 		! Element type for Force 2
keyo,9,2,1 		! Apply load in local reference frame
keyo,9,7,1 		! Use original area so load is constant in large deformation
keyo,9,11,2 		! Use real and not project area

et,10,154 		! Element type for Force 3
keyo,10,2,1 		! Apply load in local reference frame
keyo,10,7,1 		! Use original area so load is constant in large deformation
keyo,10,11,2 		! Use real and not project area
et,11,154 		! Element type for Force 3
keyo,11,2,1 		! Apply load in local reference frame
keyo,11,7,1 		! Use original area so load is constant in large deformation
keyo,11,11,2 		! Use real and not project area

et,12,154 		! Element type for Force 4
keyo,12,2,1 		! Apply load in local reference frame
keyo,12,7,1 		! Use original area so load is constant in large deformation
keyo,12,11,2 		! Use real and not project area
et,13,154 		! Element type for Force 4
keyo,13,2,1 		! Apply load in local reference frame
keyo,13,7,1 		! Use original area so load is constant in large deformation
keyo,13,11,2 		! Use real and not project area

et,14,154 		! Element type for Force 5
keyo,14,2,1 		! Apply load in local reference frame
keyo,14,7,1 		! Use original area so load is constant in large deformation
keyo,14,11,2 		! Use real and not project area
et,15,154 		! Element type for Force 5
keyo,15,2,1 		! Apply load in local reference frame
keyo,15,7,1 		! Use original area so load is constant in large deformation
keyo,15,11,2 		! Use real and not project area
et,16,154 		! Element type for Force 5
keyo,16,2,1 		! Apply load in local reference frame
keyo,16,7,1 		! Use original area so load is constant in large deformation
keyo,16,11,2 		! Use real and not project area
et,17,154 		! Element type for Force 5
keyo,17,2,1 		! Apply load in local reference frame
keyo,17,7,1 		! Use original area so load is constant in large deformation
keyo,17,11,2 		! Use real and not project area
et,18,154 		! Element type for Force 5
keyo,18,2,1 		! Apply load in local reference frame
keyo,18,7,1 		! Use original area so load is constant in large deformation
keyo,18,11,2 		! Use real and not project area

et,19,154 		! Element type for Force 6
keyo,19,2,1 		! Apply load in local reference frame
keyo,19,7,1 		! Use original area so load is constant in large deformation
keyo,19,11,2 		! Use real and not project area
et,20,154 		! Element type for Force 6
keyo,20,2,1 		! Apply load in local reference frame
keyo,20,7,1 		! Use original area so load is constant in large deformation
keyo,20,11,2 		! Use real and not project area
et,21,154 		! Element type for Force 6
keyo,21,2,1 		! Apply load in local reference frame
keyo,21,7,1 		! Use original area so load is constant in large deformation
keyo,21,11,2 		! Use real and not project area
et,22,154 		! Element type for Force 6
keyo,22,2,1 		! Apply load in local reference frame
keyo,22,7,1 		! Use original area so load is constant in large deformation
keyo,22,11,2 		! Use real and not project area
/com,*********** Done writing element types ***********
/com,*********** Write materials ***********
mp,reft,2,22 		! C
mp,dens,2,1848 		! kg m^-3
mp,alpx,2,9.2E-06 		! C^-1
mp,ex,2,300000000000 		! Pa
mp,prxy,2,0.03 		!
/com,*********** Read mesh ***********
/input,'mesh','dat'

/com,*********** Read load elements ***********
/input,'load','dat'

/com,*********** Read components ***********
/input,'component','dat'

alls
cm,_AllNodes,node
cm,_AllElems,elem
fini
/com,****************************************************************************
/com,*************************    SOLUTION       ********************************
/com,****************************************************************************
/solu
antype,static
/com,****************************************************
/com,*********** Solve for Load Step 1 ***********
*set,_val1,0
*set,_val2,0
*set,_val3,-26546.5731008083
*set,_val4,0
*set,_val5,0
*set,_val6,-5824.69616171408
*set,_val7,0
*set,_val8,0
*set,_val9,-17404.7166751706
*set,_val10,0
*set,_val11,0
*set,_val12,-11031.5249238968
*set,_val13,0
*set,_val14,0
*set,_val15,-3446.95497608305
*set,_val16,0
*set,_val17,0
*set,_val18,-2993.05357434314
*set,_val19,0
*set,_val20,0
*set,_val21,0
d,C1,ux,%_val19% 		! Contributions from Support 1
d,C1,uy,%_val20% 		! Contributions from Support 1
d,C1,uz,%_val21% 		! Contributions from Support 1
esel,s,type,,2
esel,a,type,,3
esel,a,type,,4
esel,a,type,,5
esel,a,type,,6
sfe,all,3,pres,1,%_val3% 		! Applying Force 1 z
alls
esel,s,type,,7
esel,a,type,,8
esel,a,type,,9
sfe,all,3,pres,1,%_val6% 		! Applying Force 2 z
alls
esel,s,type,,10
esel,a,type,,11
sfe,all,3,pres,1,%_val9% 		! Applying Force 3 z
alls
esel,s,type,,12
esel,a,type,,13
sfe,all,3,pres,1,%_val12% 		! Applying Force 4 z
alls
esel,s,type,,14
esel,a,type,,15
esel,a,type,,16
esel,a,type,,17
esel,a,type,,18
sfe,all,3,pres,1,%_val15% 		! Applying Force 5 z
alls
esel,s,type,,19
esel,a,type,,20
esel,a,type,,21
esel,a,type,,22
sfe,all,3,pres,1,%_val18% 		! Applying Force 6 z
alls
rescontrol,linear
outres,erase
outres,all,none 		! Don't write any results to the result file
time,1 				! Step end time
stabilize,off 			! Deactivate stabilization
neqit,0 			! Program controlled number of equilibrium iterations
outres,nsol,all 		! Writing nodal DOF solution at every substep
outres,rsol,all 		! Writing nodal reaction loads at every substep
outres,strs,all 		! Writing element nodal stresses at every substep
alls
! check interactive state
*get,ANSINTER_,active,,int
*if,ANSINTER_,ne,0,then
/eof
*endif
! *********** SOLVE COMMAND ***********
solve
/com,****************************************************
/com,*********** Finished Solve for Load Step 1 ***********
fini
/post1
fini
*get,ANSINTER_,active,,int
*if,ANSINTER_,eq,0,then
! Write file.success to verify the run made it this far
/output,'file',success
/output,'output','lis',,Append
*endif
